Pr := 320
l := 100
A := 77.95
Xф := 0.0152
Uф := 220
B := 0.0648
Xиз := 0.0152
Kr := 1.0
k := 3
Xp0 := 0.07
Pl := Pr/3 = 106.667
Xp := Xp0*l*10^-3 = 0.007
p := 1.75*10^-8
Iн := Pl/Uф = 0.484848
Iкз := k*Iн = 1.45455
Sф := Iн/Kr = 0.484848
Sиз := Sф/2 = 0.242424
Rф := p*l/Sф = 3.60938e-6
Rиз := p*l/Sиз = 7.21875e-6
a := (Uф/230)^2 = 0.914934
Zt := a*A/(Pr + B) = 0.222827
Zp := sqrt((Rф + Rиз)^2 + (Xф + Xиз + Xp)^2) = 0.0374
Iкэф := Uф/(Zt/3 + Zp) = 1969.99
