a := 0.7
h := 1.1
ПДК := 28
b := 0.9
G := 95
Q := 1100
Gp := 13
Cпр := 24
W := 0.1
Lb := 0.4
A := 0.832
B := 1.032
hn := h + b/0.24 = 4.85
r := 1.128*sqrt(a*b) = 0.895322
R := 1.128*sqrt(A*B) = 1.04523
Lпрот := 3 - 2*R/r = 0.665138
Um := 0.0425*(Q/3)^(1/3)*(h/r)^(1/3) = 0.3258
Lстр := π*r^2/3*Um = 0.273488
F1 := 4*A*B = 3.4345
F2 := 4*a*b = 2.52
Kп := 1 + (3 - F1/F2)*(W/Um) = 1.50249
Lпрот := Kп*Lстр*Lпрот = 0.273313
Спред := G/Lпрот + Cпр = 371.587
ΔCпред := (Спред - Cпр)/(ПДК - Cпр) = 86.8966
M := (Gp/G)*ΔCпред - Lb/Lпрот = 10.4276
Kη := M = 10.4276
M*(-0.252) = -2.62775
η := 1 - 0.00429 = 0.99571
Lот := Kη*Lпрот = 2.85
Gy := η*G = 94.5924
